# Udregning af varmestrøm for Al til luift
b := 20
a := 25.5
d := 0.5
A_tot := 93733.73
A_lam := a*b*2 = 1020
m := 315.8
λ_al := 229
δ := 0.5
c_pal := 0.896
c_luft := 0.025
β_luft := 3.2
υ := 18.88
η := 16.92
α := 27.4
a_tl := 21.8
t_lam := 80
t_luft := 20
Δt := t_lam - t_luft = 60
t_ref := (t_lam - t_luft)/2 = 30
Gr_L := 9.82*a^3*β_luft*Δt/υ^2 = 87706
Pr := 0.69
L_hyd := 0.5
D := 4*(b*a)/(2*a + 2*b) = 22.4176
Re := c_luft*L_hyd/υ = 0.000662076
I_løb := 0.05*Re*D = 0.000742107
L_lam := a/1000
A_lamim := A_lam/10^6 = 0.00102
Ra := Gr_L*Pr = 60517.1  # hvilket tyder på laminar strømning
# tvungen indvendig srømning : Nu_tvi
Nu_tvi := 3.66 + 0.0668*D/L_lam*Re*Pr/(1 + 0.004*(D/L_lam*Re*Pr)^(2/3)) = 3.68677
Φ := a_tl*A_lamim*(t_lam - t_luft) = 1.33416
R_l := δ/(λ_al*A_lam) = 2.14059e-6
R_o := 1/(a_tl*A_lam) = 4.49721e-5
r_tot := R_l + R_o = 4.71127e-5
# tvungen udvendig strømning
Re = 0.000662076
Pr = 0.69
Nu_tvu := 0.664*Re^(1/2)*Pr^(1/3) = 0.0150975
A_ration := A_tot/(A_lam*□)  # error: Missing term or expression.
