# Udregning af varmestrøm for Al til luft
b := 20
a := 25.5
d := 0.5
A_tot := 93733.73
A_lam := a*b*2 = 1020
m := 315.8
λ_al := 229
δ := 0.5
c_pal := 0.896
c_luft := 4
β_luft := 3.2
υ := 18.88
η := 16.92
t_lam := 80
t_luft := 20
Δt := t_lam - t_luft = 60
t_ref := (t_lam - t_luft)/2 = 30
L_hyd := 0.5
Gr_L := 9.82*a^3*β_luft*Δt/υ^2 = 87706
Pr := 0.69
D := 4*(b*a)/(2*a + 2*b) = 22.4176
Re := c_luft*L_hyd/υ = 0.105932
L_lam := a/1000
A_lamim := A_lam/10^6 = 0.00102
I_løb := 0.05*Re*D = 0.118737
Ra := Gr_L*Pr = 60517.1  # hvilket tyder på laminar strømning
# tvungen indvendig srømning : Nu_tvi
Nu_tis := 3.66 + 0.0668*D/L_lam*Re*Pr/(1 + 0.004*(D/L_lam*Re*Pr)^(2/3)) = 7.69358
a_tis := Nu_tis == a_tl*L_hyd/λ_al solve, a_tl → 3523.65861385
Φ_tis := a_tis*A_lamim*(t_lam - t_luft) = 215.648
I_løb = 0.118737
# Fri konvektion
Re = 0.105932
Pr = 0.69
Nu_fri := (Gr_L/4)^(1/4)*(0.75*Pr^(1/2)/(0.609 + 1.221*Pr^(1/2) + 1.238*Pr)^(1/4)) = 6.04264
a_fri := Nu_fri == a_fri*L_hyd/λ_al solve, a_fri → 2767.52784609 = 2767.53
Φ_fri := a_fri*A_lamim*(t_lam - t_luft) = 169.373
